*Heading
** Job name: RVE_a100_r20_t5_eat4 Model name: Model-1
** Generated by: Abaqus/CAE 2018
*Preprint, echo=NO, model=NO, history=NO, contact=NO
**
** PARTS
**
*Part, name=Part-1
*Node
      1,         -20.,           0.
      2,         -25.,           0.
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*Element, type=CPS4R
 1,   1,  13, 269,  40
 2,  13,  14, 270, 269
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*Nset, nset=Set-1
    2,    3,    7,    8,    9,   10
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*Elset, elset=Set-1, generate
  356,  1659,     1
*Nset, nset=Set-2
   1,   4,   5,   6,  30,  31
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*Elset, elset=Set-2, generate
  49,  307,    1
*Nset, nset=Set-3
    1,    2,    3,    4,    5,    6
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*Elset, elset=Set-3
    1,    2,    3,    4,    5,    6
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** Section: Section-3
*Solid Section, elset=Set-3, material=Material-3
,
** Section: Section-2
*Solid Section, elset=Set-2, material=Material-2
,
** Section: Section-1
*Solid Section, elset=Set-1, material=Material-1
,
*End Part
**
**
** ASSEMBLY
**
*Assembly, name=Assembly
**
*Instance, name=Part-1-1, part=Part-1
*End Instance
**
*End Assembly
**
** MATERIALS
**
*Material, name=Material-1
*Material, name=Material-2
*Material, name=Material-3
