*Heading
** Job name: 3d_test_abaqus Model name: Model-1
** Generated by: Abaqus/CAE 6.13-3
*Preprint, echo=NO, model=NO, history=NO, contact=NO
**
** PARTS
**
*Part, name=Part-1
*End Part
**
**
** ASSEMBLY
**
*Assembly, name=Assembly
**
*Instance, name=Part-1-1, part=Part-1
*Node
      1,           0.,           1.,           1.
      2,           1.,           1.,           1.
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*Element, type=C3D8R
  1,  54, 181, 369, 149,   1,  15, 117,  30
  2, 181, 182, 370, 369,  15,  16, 118, 117
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*Nset, nset=_PickedSet3, internal
   1,   2,   3,   4,   5,   6
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*Elset, elset=_PickedSet3, internal, generate
   1,  125,    1
*Nset, nset=_PickedSet4, internal
   2,   3,   5,   6,   9,  10
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*Elset, elset=_PickedSet4, internal, generate
 126,  375,    1
** Section: Section-1
*Solid Section, elset=_PickedSet3, material=Material-1
,
** Section: Section-2
*Solid Section, elset=_PickedSet4, material=Material-2
,
*End Instance
**
*Elset, elset=_Surf-1_S6, internal, instance=Part-1-1, generate
   1,  121,    5
*Surface, type=ELEMENT, name=Surf-1
_Surf-1_S6, S6
*Elset, elset=_Surf-2_S3, internal, instance=Part-1-1
 126, 127, 128, 129, 130, 176
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*Surface, type=ELEMENT, name=Surf-2
_Surf-2_S3, S3
*Elset, elset=_Surf-3_S1, internal, instance=Part-1-1
 101, 102, 103, 104, 105, 106
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*Elset, elset=_Surf-3_S5, internal, instance=Part-1-1
 171, 172, 173, 174, 175, 221
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*Surface, type=ELEMENT, name=Surf-3
_Surf-3_S1, S1
_Surf-3_S5, S5
*End Assembly
**
** MATERIALS
**
*Material, name=Material-1
*Material, name=Material-2
