*HEADING
cubit(ellipsoid_cavity.inp): 07/02/2026: 16:29:53
version: 2025.3
**
********************************** P A R T S **********************************
*PART, NAME=Part-Default
**
********************************** N O D E S **********************************
*NODE, NSET=ALLNODES
       1,    5.000000e+03,   -5.048710e-29,   -6.860000e+03
       2,    0.000000e+00,   -5.710000e+03,   -6.860000e+03
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**
********************************** E L E M E N T S ****************************
*ELEMENT, TYPE=C3D8R, ELSET=EB17
       1,    1118,    1152,    1156,    1145,     955,     970,     969,     968
       2,    1100,    1118,    1145,    1099,     937,     955,     968,     936
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*ELEMENT, TYPE=C3D8R, ELSET=EB18
     215,    1459,    1500,    1504,    1493,    1314,    1336,    1335,    1334
     216,    1448,    1459,    1493,    1447,    1303,    1314,    1334,    1302
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*ELEMENT, TYPE=C3D8R, ELSET=EB19
     429,    1809,    1838,    1854,    1853,    1662,    1684,    1683,    1682
     430,    1798,    1809,    1853,    1797,    1651,    1662,    1682,    1650
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*ELEMENT, TYPE=C3D8R, ELSET=EB20
     647,    2142,    2171,    2181,    2180,    2013,    2029,    2028,    2027
     648,    2125,    2142,    2180,    2124,    1996,    2013,    2027,    1995
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*ELEMENT, TYPE=C3D8R, ELSET=EB21
     865,     955,     970,     969,     968,    2397,    2430,    2436,    2424
     866,     937,     955,     968,     936,    2379,    2397,    2424,    2378
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*ELEMENT, TYPE=C3D8R, ELSET=EB22
    1079,    1314,    1336,    1335,    1334,    2622,    2662,    2668,    2656
    1080,    1303,    1314,    1334,    1302,    2611,    2622,    2656,    2610
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*ELEMENT, TYPE=C3D8R, ELSET=EB23
    1293,    1662,    1684,    1683,    1682,    2854,    2882,    2900,    2898
    1294,    1651,    1662,    1682,    1650,    2843,    2854,    2898,    2842
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*ELEMENT, TYPE=C3D8R, ELSET=EB24
    1511,    2013,    2029,    2028,    2027,    3078,    3106,    3118,    3116
    1512,    1996,    2013,    2027,    1995,    3061,    3078,    3116,    3060
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*ELEMENT, TYPE=C3D8R, ELSET=EB25
    1729,     143,     145,    2465,    2303,     251,     272,    3888,    3756
    1730,     144,    2466,    2465,     145,     271,    3889,    3888,     272
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*ELEMENT, TYPE=C3D8R, ELSET=EB26
    3548,     176,     178,    2697,    2553,     489,     493,    5860,    5558
    3549,     177,    2698,    2697,     178,     492,    5861,    5860,     493
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*ELEMENT, TYPE=C3D8R, ELSET=EB27
    5367,     142,     199,    2931,    2369,     255,     646,    7832,    3278
    5368,     198,    2932,    2931,     199,     645,    7833,    7832,     646
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*ELEMENT, TYPE=C3D8R, ELSET=EB28
    7220,     197,     222,    3149,    2813,     629,     799,    9685,    7375
    7221,     221,    3150,    3149,     222,     798,    9686,    9685,     799
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*ELEMENT, TYPE=C3D8R, ELSET=EB3
    9073,       7,      10,      45,      18,       8,      11,      48,      20
    9074,      18,      45,      44,      17,      20,      48,      47,      19
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*ELEMENT, TYPE=C3D8R, ELSET=EB4
    9092,      26,      28,      76,      75,      41,      46,      82,      79
    9093,      41,      46,      82,      79,      40,      44,      80,      78
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*ELEMENT, TYPE=C3D8R, ELSET=EB5
    9111,      26,      27,     115,     103,      28,      29,     118,     107
    9112,     103,     115,     114,     104,     107,     118,     116,     105
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*ELEMENT, TYPE=C3D8R, ELSET=EB6
    9130,      84,     121,     133,     101,      88,     124,     139,     106
    9131,     101,     133,     132,     102,     106,     139,     138,     105
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*ELEMENT, TYPE=C3D8R, ELSET=EB7
    9149,       2,     147,     168,      33,       4,     148,     173,      37
    9150,      33,     168,     167,      32,      37,     173,     172,      36
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*ELEMENT, TYPE=C3D8R, ELSET=EB8
    9168,      51,     179,     190,      68,      53,     181,     196,      74
    9169,      68,     190,     189,      67,      74,     196,     195,      73
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*ELEMENT, TYPE=C3D8R, ELSET=EB9
    9187,     100,     108,     215,     206,     102,     110,     217,     208
    9188,     153,     207,     216,     155,     154,     210,     219,     156
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*ELEMENT, TYPE=C3D8R, ELSET=EB10
    9206,     153,     188,     230,     207,     154,     189,     233,     210
    9207,     207,     230,     229,     206,     210,     233,     231,     208
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*ELEMENT, TYPE=C3D8R, ELSET=EB11
    9225,     164,     151,     142,     144,     408,     373,     255,     271
    9226,     162,     164,     144,     145,     405,     408,     271,     272
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*ELEMENT, TYPE=C3D8R, ELSET=EB12
    9361,     185,     160,     143,     177,     560,     338,     251,     492
    9362,     184,     159,     160,     185,     561,     354,     338,     560
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*ELEMENT, TYPE=C3D8R, ELSET=EB13
    9497,     212,     203,     197,     198,     730,     680,     629,     645
    9498,     211,     204,     203,     212,     731,     696,     680,     730
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*ELEMENT, TYPE=C3D8R, ELSET=EB14
    9633,     228,     183,     176,     221,     833,     541,     489,     798
    9634,     226,     228,     221,     222,     830,     833,     798,     799
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**
********************************** N O D E S E T S **********************************
*NSET, NSET=NS1
    1273,    1284,    1285,    1286,    1287,    1288
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*NSET, NSET=NS2
     898,     907,     908,     909,     910,     911
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*NSET, NSET=NS3
     907,     918,     919,     920,     921,     922
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*NSET, NSET=NS4
    1621,    1630,    1631,    1632,    1633,    1634
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*NSET, NSET=NS5
     235,     252,     253,     254,     303,     320
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*NSET, NSET=NS6
       5,       7,       8,       9,      13,      14
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*NSET, NSET=NS99
      23,      26,      27,      31,      34,      35
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**
********************************** S I D E S E T S **********************************
*ELSET, ELSET=xmin_S3
     292,     293,     294,     295,     296,     297
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*ELSET, ELSET=xmin_S4
     308,     415,     727,     836,    1172,    1279
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*ELSET, ELSET=xmin_S6
     752,     861,    1616,    1725,    7223,    7332
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*SURFACE, NAME=xmin
xmin_S3, S3
xmin_S4, S4
xmin_S6, S6
*ELSET, ELSET=xmax_S3
      94,      95,      96,      97,      98,      99
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*SURFACE, NAME=xmax
xmax_S3, S3
*ELSET, ELSET=ymin_S3
      71,      72,      73,      74,      75,      76
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*ELSET, ELSET=ymin_S4
      94,     201,     958,    1065,    1742,    1849
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*ELSET, ELSET=ymin_S6
      93,     200,     957,    1064,    1743,    1850
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*SURFACE, NAME=ymin
ymin_S3, S3
ymin_S4, S4
ymin_S6, S6
*ELSET, ELSET=ymax_S3
     501,     502,     503,     504,     505,     506
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*ELSET, ELSET=ymax_S4
     516,     625,    1380,    1489,    5388,    5497
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*ELSET, ELSET=ymax_S6
     534,     643,    1398,    1507,    5370,    5479
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*SURFACE, NAME=ymax
ymax_S3, S3
ymax_S4, S4
ymax_S6, S6
*ELSET, ELSET=zmin_S2
    3441,    3442,    3443,    3444,    3445,    3446
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*SURFACE, NAME=zmin
zmin_S2, S2
*ELSET, ELSET=zmax_S1
     108,     109,     110,     111,     112,     113
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*ELSET, ELSET=zmax_S3
    9100,    9101,    9107,    9108,    9109,    9110,    9135,    9136
*ELSET, ELSET=zmax_S6
    9073,    9074,    9105,    9106,    9128,    9129,    9145,    9146,    9147,    9148
*SURFACE, NAME=zmax
zmax_S1, S1
zmax_S3, S3
zmax_S6, S6
*ELSET, ELSET=magma_boundary_S1
    9111,    9112,    9132,    9137,    9138,    9167,    9184,    9187,    9188,    9189,
    9206,    9207,    9223,    9224
*ELSET, ELSET=magma_boundary_S3
    9084,    9085,    9094,    9095,    9102,    9119,    9139,    9140,    9161,    9162,
    9174,    9175,    9190,    9191,    9208
*ELSET, ELSET=magma_boundary_S6
    9077,    9082,    9083,    9092,    9093,    9117,    9118,    9159,    9160,    9172,
    9173
*SURFACE, NAME=magma_boundary
magma_boundary_S1, S1
magma_boundary_S3, S3
magma_boundary_S6, S6
**
********************************** P R O P E R T I E S ************************
*SOLID SECTION, ELSET=EB17, MATERIAL=Default-Steel
*SOLID SECTION, ELSET=EB18, MATERIAL=Default-Steel
*SOLID SECTION, ELSET=EB19, MATERIAL=Default-Steel
*SOLID SECTION, ELSET=EB20, MATERIAL=Default-Steel
*SOLID SECTION, ELSET=EB21, MATERIAL=Default-Steel
*SOLID SECTION, ELSET=EB22, MATERIAL=Default-Steel
*SOLID SECTION, ELSET=EB23, MATERIAL=Default-Steel
*SOLID SECTION, ELSET=EB24, MATERIAL=Default-Steel
*SOLID SECTION, ELSET=EB25, MATERIAL=Default-Steel
*SOLID SECTION, ELSET=EB26, MATERIAL=Default-Steel
*SOLID SECTION, ELSET=EB27, MATERIAL=Default-Steel
*SOLID SECTION, ELSET=EB28, MATERIAL=Default-Steel
*SOLID SECTION, ELSET=EB3, MATERIAL=Default-Steel
*SOLID SECTION, ELSET=EB4, MATERIAL=Default-Steel
*SOLID SECTION, ELSET=EB5, MATERIAL=Default-Steel
*SOLID SECTION, ELSET=EB6, MATERIAL=Default-Steel
*SOLID SECTION, ELSET=EB7, MATERIAL=Default-Steel
*SOLID SECTION, ELSET=EB8, MATERIAL=Default-Steel
*SOLID SECTION, ELSET=EB9, MATERIAL=Default-Steel
*SOLID SECTION, ELSET=EB10, MATERIAL=Default-Steel
*SOLID SECTION, ELSET=EB11, MATERIAL=Default-Steel
*SOLID SECTION, ELSET=EB12, MATERIAL=Default-Steel
*SOLID SECTION, ELSET=EB13, MATERIAL=Default-Steel
*SOLID SECTION, ELSET=EB14, MATERIAL=Default-Steel
**
*END PART
**
**
**
********************************** E N D   P A R T S **********************************
**
**
********************************** A S S E M B L Y ************************************
**
*ASSEMBLY, NAME=ASSEMBLY1
**
*INSTANCE, NAME=Part-Default_1, PART=Part-Default
*END INSTANCE
**
*END ASSEMBLY
**
**
**
*MATERIAL, NAME = Default-Steel
*ELASTIC, TYPE=ISOTROPIC
2.068000e+05, 2.900000e-01
*DENSITY
7.000000e-06
*CONDUCTIVITY,TYPE=ISO
4.500000e-02
*SPECIFIC HEAT
5.000000e+02
**
**
************************************** H I S T O R Y *************************************
**
*PREPRINT
**
**************************************** S T E P 1 ***************************************
*STEP,INC=100,NAME=Default Set
**
*STATIC
1, 1, 1e-05, 1
**
**
**
**
*END STEP
